// SBML level 2 version 3

model petri_net_spstochpn()

  // Compartments:
  compartment compartment = 1;

  // Species:
  substanceOnly species stress in compartment = 1;
  substanceOnly species dm in compartment = 0;
  substanceOnly species im in compartment = 60;
  substanceOnly species olg in compartment = 0;
  substanceOnly species hBCAF in compartment = 20;
  substanceOnly species TF in compartment = 0;
  substanceOnly species hBCA in compartment = 0;
  substanceOnly species hBcCcAc in compartment = 0;

  // Parameters:
  c1 = 1;
  c2 = 1;
  c3 = 1;
  c4 = 1;
  c5 = 1;
  c6 = 1;
  c7 = 1;
  c8 = 1;
  c9 = 1;
  c10 = 1;

  // Reactions:
  tr1: stress + im => stress + dm; c1*stress*im;
  tr2: dm + olg => im + olg; c2*dm*olg;
  tr5: dm + hBCAF => dm + TF + hBcCcAc; c5*dm*hBCAF;
  tr10: olg => ; c10*olg;
  tr4: TF + hBCA => hBCAF; c4*TF*hBCA;
  tr3: TF => TF + olg + 10 hBCA; c3*TF;
  tr6: hBcCcAc + im => hBCA + im; c6*hBcCcAc*im;
  tr7: hBCA + dm => hBcCcAc + dm; c7*hBCA*dm;
  tr8: hBCA => ; c8*hBCA;
  tr9: hBcCcAc => ; c9*hBcCcAc;
end
